<?xml version="1.0" encoding="UTF-8"?>
<?xml-stylesheet type="text/xsl" href="http://jsbsim.sourceforge.net/JSBSim.xsl"?>
<fdm_config xmlns:xsi="http://www.w3.org/2001/XMLSchema-instance" name="szd-50" version="2.0" release="ALPHA" xsi:noNamespaceSchemaLocation="http://jsbsim.sourceforge.net/JSBSim.xsd">
	<fileheader>
		<author> AeromatiC++ version 3.3.20 </author>
		<filecreationdate> 21 May 2022 </filecreationdate>
		<version>$Revision: 1.80 $</version>
		<description>Models a SZD-50</description>
	</fileheader>
	<metrics>
		<wingarea unit="FT2">175</wingarea>
		<wingspan unit="FT">35.77</wingspan>
		<wing_incidence unit="DEG">2.5</wing_incidence>
		<chord unit="FT">5.08</chord>
		<htailarea unit="FT2">22.1</htailarea>
		<htailarm unit="FT">19</htailarm>
		<vtailarea unit="FT2">11.7</vtailarea>
		<vtailarm unit="FT">20.1</vtailarm>
		<location name="AERORP" unit="IN">
			<x>37.44</x>
			<y>0</y>
			<z>-14.6</z>
		</location>
		<location name="EYEPOINT" unit="IN">
			<x>52</x>
			<y>-12</y>
			<z>7</z>
		</location>
		<location name="VRP" unit="IN">
			<x>0</x>
			<y>0</y>
			<z>0</z>
		</location>
	</metrics>

	<mass_balance>
		<ixx unit="SLUG*FT2">8884</ixx>
		<iyy unit="SLUG*FT2">1939</iyy>
		<izz unit="SLUG*FT2">11001</izz>
		<emptywt unit="LBS">2905</emptywt>
		<location name="CG" unit="IN">
			<x>34.2</x>
			<y>0</y>
			<z>0</z>
		</location>

		<pointmass name="Pilot">
			<weight unit="LBS">200</weight>
			<location name="POINTMASS" unit="IN">
				<x>37</x>
				<y>0</y>
				<z>0</z>
			</location>
		</pointmass>

		<pointmass name="Passenger">
			<weight unit="LBS">0</weight>
			<location name="POINTMASS" unit="IN">
				<x>71.25</x>
				<y>0</y>
				<z>0</z>
			</location>
		</pointmass>
	</mass_balance>

	<propulsion/>

	<ground_reactions>
		<contact type="BOGEY" name="NOSE">
			<location unit="IN">
				<x>-60.7</x>
				<y>0</y>
				<z>-71.6</z>
			</location>
			<static_friction>1.5</static_friction>
			<dynamic_friction>0.5</dynamic_friction>
			<rolling_friction> 0.02 </rolling_friction>
			<spring_coeff unit="LBS/FT">8000</spring_coeff>
			<damping_coeff unit="LBS/FT/SEC">700</damping_coeff>
			<max_steer unit="DEG">55</max_steer>
			<brake_group>NONE</brake_group>
			<retractable>1</retractable>
		</contact>

		<contact type="BOGEY" name="REAR">
			<location unit="IN">
				<x>50.2</x>
				<y>0</y>
				<z>-67.9</z>
			</location>
			<static_friction>0.8</static_friction>
			<dynamic_friction>0.5</dynamic_friction>
			<rolling_friction>0.02</rolling_friction>
			<spring_coeff unit="LBS/FT">10000</spring_coeff>
			<damping_coeff unit="LBS/FT/SEC">1000</damping_coeff>
			<max_steer unit="DEG">0</max_steer>
			<brake_group>LEFT</brake_group>
			<retractable>1</retractable>
		</contact>

		<contact type="STRUCTURE" name="Left wing tip tank front tip">
			<location unit="IN">
				<x>-6.9</x>
				<y>-214.4</y>
				<z>-14.9</z>
			</location>
			<static_friction>0.5</static_friction>
			<dynamic_friction>0.5</dynamic_friction>
			<spring_coeff unit="LBS/FT">5400</spring_coeff>
			<damping_coeff unit="LBS/FT/SEC">2700</damping_coeff>
		</contact>

		<contact type="STRUCTURE" name="Right wing tip tank front tip">
			<location unit="IN">
				<x>-6.9</x>
				<y>214.4</y>
				<z>-14.9</z>
			</location>
			<static_friction>0.5</static_friction>
			<dynamic_friction>0.5</dynamic_friction>
			<spring_coeff unit="LBS/FT">5400</spring_coeff>
			<damping_coeff unit="LBS/FT/SEC">2700</damping_coeff>
		</contact>
	</ground_reactions>

	<!--<flight_control file="Systems/310a-fdm-fcs.xml"/>

	<aerodynamics file="Systems/310-fdm-aerodynamics.xml"/>-->

	<external_reactions/>
</fdm_config>
